*HEADING
CalculiX Dynamic Job: ccx_bending_yspan
*INCLUDE, INPUT=ccx_bending_yspan_mesh.inp

*MATERIAL, NAME=MAT_PROP_1
*ELASTIC
200000.0, 0.29
*DENSITY
7.6e-09

*SHELL SECTION, ELSET=ELSET_PROP_1, MATERIAL=MAT_PROP_1
0.5

*STEP
*STATIC
*BOUNDARY
5, 1, 1, 0.00000000
5, 2, 2, 0.00000000
5, 3, 3, 0.00000000
5, 4, 4, 0.00000000
5, 5, 5, 0.00000000
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290, 6, 6, 0.00000000
*CLOAD
1229, 3, -5.00000000
1230, 3, -5.00000000
1231, 3, -5.00000000
1232, 3, -5.00000000
1233, 3, -5.00000000
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1724, 3, -5.00000000
*NODE PRINT, NSET=Nall
U
*NODE FILE
U
*EL FILE
S
*END STEP
