*HEADING
CalculiX Dynamic Job: ccx_lifting_c0
*INCLUDE, INPUT=ccx_lifting_c0_mesh.inp

*MATERIAL, NAME=MAT_PROP_1
*ELASTIC
200000.0, 0.29
*DENSITY
7.6e-09

*SHELL SECTION, ELSET=ELSET_PROP_1, MATERIAL=MAT_PROP_1
0.5

*STEP
*STATIC
*BOUNDARY
2, 1, 1, 0.00000000
2, 2, 2, 0.00000000
2, 3, 3, 0.00000000
47, 1, 1, 0.00000000
47, 2, 2, 0.00000000
47, 3, 3, 0.00000000
48, 1, 1, 0.00000000
48, 2, 2, 0.00000000
48, 3, 3, 0.00000000
49, 1, 1, 0.00000000
49, 2, 2, 0.00000000
49, 3, 3, 0.00000000
50, 1, 1, 0.00000000
50, 2, 2, 0.00000000
50, 3, 3, 0.00000000
388, 1, 1, 0.00000000
388, 2, 2, 0.00000000
388, 3, 3, 0.00000000
2449, 1, 1, 0.00000000
2449, 2, 2, 0.00000000
2449, 3, 3, 0.00000000
2450, 1, 1, 0.00000000
2450, 2, 2, 0.00000000
2450, 3, 3, 0.00000000
2503, 1, 1, 0.00000000
2503, 2, 2, 0.00000000
2503, 3, 3, 0.00000000
2504, 1, 1, 0.00000000
2504, 2, 2, 0.00000000
2504, 3, 3, 0.00000000
2671, 1, 1, 0.00000000
2671, 2, 2, 0.00000000
2671, 3, 3, 0.00000000
2674, 1, 1, 0.00000000
2674, 2, 2, 0.00000000
2674, 3, 3, 0.00000000
2677, 1, 1, 0.00000000
2677, 2, 2, 0.00000000
2677, 3, 3, 0.00000000
2680, 1, 1, 0.00000000
2680, 2, 2, 0.00000000
2680, 3, 3, 0.00000000
4, 1, 1, 0.00000000
4, 2, 2, 0.00000000
4, 3, 3, 0.00000000
141, 1, 1, 0.00000000
141, 2, 2, 0.00000000
141, 3, 3, 0.00000000
142, 1, 1, 0.00000000
142, 2, 2, 0.00000000
142, 3, 3, 0.00000000
143, 1, 1, 0.00000000
143, 2, 2, 0.00000000
143, 3, 3, 0.00000000
144, 1, 1, 0.00000000
144, 2, 2, 0.00000000
144, 3, 3, 0.00000000
394, 1, 1, 0.00000000
394, 2, 2, 0.00000000
394, 3, 3, 0.00000000
449, 1, 1, 0.00000000
449, 2, 2, 0.00000000
449, 3, 3, 0.00000000
450, 1, 1, 0.00000000
450, 2, 2, 0.00000000
450, 3, 3, 0.00000000
503, 1, 1, 0.00000000
503, 2, 2, 0.00000000
503, 3, 3, 0.00000000
504, 1, 1, 0.00000000
504, 2, 2, 0.00000000
504, 3, 3, 0.00000000
2953, 1, 1, 0.00000000
2953, 2, 2, 0.00000000
2953, 3, 3, 0.00000000
2956, 1, 1, 0.00000000
2956, 2, 2, 0.00000000
2956, 3, 3, 0.00000000
2959, 1, 1, 0.00000000
2959, 2, 2, 0.00000000
2959, 3, 3, 0.00000000
2962, 1, 1, 0.00000000
2962, 2, 2, 0.00000000
2962, 3, 3, 0.00000000
3, 1, 1, 0.00000000
3, 2, 2, 0.00000000
3, 3, 3, 0.00000000
101, 1, 1, 0.00000000
101, 2, 2, 0.00000000
101, 3, 3, 0.00000000
102, 1, 1, 0.00000000
102, 2, 2, 0.00000000
102, 3, 3, 0.00000000
103, 1, 1, 0.00000000
103, 2, 2, 0.00000000
103, 3, 3, 0.00000000
104, 1, 1, 0.00000000
104, 2, 2, 0.00000000
104, 3, 3, 0.00000000
391, 1, 1, 0.00000000
391, 2, 2, 0.00000000
391, 3, 3, 0.00000000
2501, 1, 1, 0.00000000
2501, 2, 2, 0.00000000
2501, 3, 3, 0.00000000
2502, 1, 1, 0.00000000
2502, 2, 2, 0.00000000
2502, 3, 3, 0.00000000
2555, 1, 1, 0.00000000
2555, 2, 2, 0.00000000
2555, 3, 3, 0.00000000
2556, 1, 1, 0.00000000
2556, 2, 2, 0.00000000
2556, 3, 3, 0.00000000
2833, 1, 1, 0.00000000
2833, 2, 2, 0.00000000
2833, 3, 3, 0.00000000
2836, 1, 1, 0.00000000
2836, 2, 2, 0.00000000
2836, 3, 3, 0.00000000
2839, 1, 1, 0.00000000
2839, 2, 2, 0.00000000
2839, 3, 3, 0.00000000
2842, 1, 1, 0.00000000
2842, 2, 2, 0.00000000
2842, 3, 3, 0.00000000
*CLOAD
1, 3, 142.85714286
9, 3, 142.85714286
10, 3, 142.85714286
195, 3, 142.85714286
196, 3, 142.85714286
385, 3, 142.85714286
397, 3, 142.85714286
398, 3, 142.85714286
451, 3, 142.85714286
452, 3, 142.85714286
2557, 3, 142.85714286
2560, 3, 142.85714286
3115, 3, 142.85714286
3118, 3, 142.85714286
*NODE PRINT, NSET=Nall
U
*NODE FILE
U
*EL FILE
S
*END STEP
